*Heading
** Job name: LBA_beam Model name: I_beam
** Generated by: Abaqus/CAE 6.13-3
*Preprint, echo=NO, model=NO, history=NO, contact=NO
**
** PARTS
**
*Part, name=beam
*Node
      1,  0.172000006,           0.,   2.53999996
      2,  0.172000006,           0.,           0.
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*Element, type=S4R
   1,    1,   13,  857,  280
   2,   13,   14,  858,  857
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*Nset, nset=Set-1, generate
    1,  6400,     1
*Elset, elset=Set-1, generate
    1,  6223,     1
** Section: Section-1
*Shell Section, elset=Set-1, material=Aluminum
<tkns>, 5
*Transverse Shear
<trshr>, <trshr>, 0.
*End Part
**
**
** ASSEMBLY
**
*Assembly, name=Assembly
**
*Instance, name=beam-1, part=beam
*End Instance
**
*Node
      1,  0.172000006,  0.127000004,   2.53999996
*Node
      2,  0.172000006,  0.127000004,           0.
*Nset, nset=center, instance=beam-1
 3622, 3623, 3634, 3635
*Nset, nset=left_nodes, instance=beam-1
   1,   4,   5,   7,   9,  12
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*Nset, nset=m_Set-4
 1,
*Nset, nset=m_Set-5
 2,
*Nset, nset=right_nodes, instance=beam-1
   2,   3,   6,   8,  10,  11
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*Surface, type=NODE, name=left_nodes_CNS_, internal
left_nodes, 1.
*Surface, type=NODE, name=right_nodes_CNS_, internal
right_nodes, 1.
** Constraint: left
*MPC
BEAM, left_nodes, m_Set-4
** Constraint: right
*MPC
BEAM, right_nodes, m_Set-5
*End Assembly
**
** PARAMETER DEFINITION
**
*Parameter
y_mod=<youngs_modulus>
tkns=<thickness>
nu=0.3333
trshr=5./6.*y_mod*tkns/(2*(1+nu))
** trshr=5.47688e+08
**
** MATERIALS
**
*Material, name=Aluminum
*Density
2700.,
*Elastic
<y_mod>, <nu>
** ----------------------------------------------------------------
**
** STEP: buckle
**
*Step, name=buckle, nlgeom=NO, perturbation
*Buckle
2, , 18, 3000
**
** BOUNDARY CONDITIONS
**
** Name: center Type: Displacement/Rotation
*Boundary, op=NEW, load case=1
center, 3, 3
*Boundary, op=NEW, load case=2
center, 3, 3
** Name: left Type: Displacement/Rotation
*Boundary, op=NEW, load case=1
m_Set-4, 1, 1
m_Set-4, 2, 2
m_Set-4, 6, 6
*Boundary, op=NEW, load case=2
m_Set-4, 1, 1
m_Set-4, 2, 2
m_Set-4, 6, 6
** Name: right Type: Displacement/Rotation
*Boundary, op=NEW, load case=1
m_Set-5, 1, 1
m_Set-5, 2, 2
m_Set-5, 6, 6
*Boundary, op=NEW, load case=2
m_Set-5, 1, 1
m_Set-5, 2, 2
m_Set-5, 6, 6
**
** LOADS
**
** Name: left   Type: Moment
*Cload
m_Set-4, 4, -1.
** Name: right   Type: Moment
*Cload
m_Set-5, 4, 1.
**
** OUTPUT REQUESTS
**
*Restart, write, frequency=0
**
** FIELD OUTPUT: F-Output-1
**
*Output, field, variable=PRESELECT
*End Step
